// SBML level 2 version 3

model NetLand_NetLand_temp_1447998459591()

  // Compartments:
  compartment cytosol = 1;
  compartment compartment = 1;

  // Species:
  substanceOnly species CDX2 in cytosol = 1;
  substanceOnly species PBX1 in cytosol = 1;
  substanceOnly species GATA6 in cytosol = 1;
  substanceOnly species E2F4 in cytosol = 1;
  substanceOnly species TDGF1 in cytosol = 1;
  substanceOnly species FOXA2 in cytosol = 1;
  substanceOnly species SOX17 in cytosol = 1;
  substanceOnly species OCT4FOXD3 in cytosol = 1;
  substanceOnly species FOXA1 in cytosol = 1;
  substanceOnly species AFP in cytosol = 1;
  substanceOnly species SUMO1 in cytosol = 1;
  substanceOnly species GATA4 in cytosol = 1;
  substanceOnly species PIAS1 in cytosol = 1;
  substanceOnly species PRDM14 in cytosol = 1;
  substanceOnly species LMCD1 in cytosol = 1;
  substanceOnly species T in cytosol = 1;
  substanceOnly species CSH1 in cytosol = 1;
  substanceOnly species GATA2 in cytosol = 1;
  substanceOnly species PIASy in cytosol = 1;
  substanceOnly species GATA3 in cytosol = 1;
  substanceOnly species hCGa in cytosol = 1;
  substanceOnly species cAMP in cytosol = 1;
  substanceOnly species SP1 in cytosol = 1;
  substanceOnly species hCGb in cytosol = 1;
  substanceOnly species SP3 in cytosol = 1;
  substanceOnly species BMP2K in cytosol = 1;
  substanceOnly species BMP2 in cytosol = 1;
  substanceOnly species HNF4A in cytosol = 1;
  substanceOnly species bCAT in cytosol = 1;
  substanceOnly species CEBP in cytosol = 1;
  substanceOnly species FOXO1A in cytosol = 1;
  substanceOnly species LEF1 in cytosol = 1;
  substanceOnly species LEF1bCat in cytosol = 1;
  substanceOnly species Mad in cytosol = 1;
  substanceOnly species MadMax in cytosol = 1;
  substanceOnly species MAX in cytosol = 1;
  substanceOnly species MYC in cytosol = 1;
  substanceOnly species TCF3 in cytosol = 1;
  substanceOnly species MycMax in cytosol = 1;
  substanceOnly species MYCSP1 in cytosol = 1;
  substanceOnly species NFYA in cytosol = 1;
  substanceOnly species SALL4 in cytosol = 1;
  substanceOnly species ZNF206 in cytosol = 1;
  substanceOnly species NANOG in cytosol = 1;
  substanceOnly species OCT4 in cytosol = 1;
  substanceOnly species OCT4Sox2 in cytosol = 1;
  substanceOnly species SOX2 in cytosol = 1;
  substanceOnly species ZIC3 in cytosol = 1;
  substanceOnly species KLF4 in cytosol = 1;
  substanceOnly species FOXD3 in cytosol = 1;
  substanceOnly species ZFP42 in cytosol = 1;
  substanceOnly species GDF3 in cytosol = 1;

  // Reactions:
  CDX2_synthesis: -> CDX2; -CDX2 + 0.37*CDX2^3/(0.5^3 + CDX2^3) + 0.5*0.5^3/(0.5^3 + OCT4^3) + 0.5*0.5^3/(0.5^3 + NANOG^3); CDX2_synthesis is "-CDX2+0.37*CDX2^3/(0.5^3+CDX2^3)+0.5*0.5^3/(0.5^3+OCT4^3)+0.5*0.5^3/(0.5^3+NANOG^3)";  // modifiers: OCT4, NANOG
  PBX1_synthesis: -> PBX1; -PBX1 + 0.37*NANOG^3/(0.5^3 + NANOG^3); PBX1_synthesis is "-PBX1+0.37*NANOG^3/(0.5^3+NANOG^3)";  // modifiers: NANOG
  GATA6_synthesis: -> GATA6; -GATA6 + 0.37*GATA6^3/(0.5^3 + GATA6^3) + 0.5*0.5^3/(0.5^3 + PRDM14^3) + 0.5*0.5^3/(0.5^3 + OCT4^3) + 0.5*0.5^3/(0.5^3 + LMCD1^3) + 0.5*0.5^3/(0.5^3 + NANOG^3) + 0.5*0.5^3/(0.5^3 + GATA4^3); GATA6_synthesis is "-GATA6+0.37*GATA6^3/(0.5^3+GATA6^3)+0.5*0.5^3/(0.5^3+PRDM14^3)+0.5*0.5^3/(0.5^3+OCT4^3)+0.5*0.5^3/(0.5^3+LMCD1^3)+0.5*0.5^3/(0.5^3+NANOG^3)+0.5*0.5^3/(0.5^3+GATA4^3)";  // modifiers: PRDM14, OCT4, LMCD1, NANOG, GATA4
  E2F4_synthesis: -> E2F4; -E2F4; E2F4_synthesis is "-E2F4";
  TDGF1_synthesis: -> TDGF1; -TDGF1 + 0.37*NANOG^3/(0.5^3 + NANOG^3) + 0.37*OCT4^3/(0.5^3 + OCT4^3) + 0.37*SOX2^3/(0.5^3 + SOX2^3); TDGF1_synthesis is "-TDGF1+0.37*NANOG^3/(0.5^3+NANOG^3)+0.37*OCT4^3/(0.5^3+OCT4^3)+0.37*SOX2^3/(0.5^3+SOX2^3)";  // modifiers: NANOG, OCT4, SOX2
  FOXA2_synthesis: -> FOXA2; -FOXA2 + 0.37*FOXD3^3/(0.5^3 + FOXD3^3) + 0.37*FOXA2^3/(0.5^3 + FOXA2^3) + 0.37*SOX17^3/(0.5^3 + SOX17^3) + 0.5*0.5^3/(0.5^3 + OCT4FOXD3^3); FOXA2_synthesis is "-FOXA2+0.37*FOXD3^3/(0.5^3+FOXD3^3)+0.37*FOXA2^3/(0.5^3+FOXA2^3)+0.37*SOX17^3/(0.5^3+SOX17^3)+0.5*0.5^3/(0.5^3+OCT4FOXD3^3)";  // modifiers: FOXD3, SOX17, OCT4FOXD3
  SOX17_synthesis: -> SOX17; -SOX17 + 0.5*0.5^3/(0.5^3 + ZIC3^3) + 0.5*0.5^3/(0.5^3 + OCT4^3); SOX17_synthesis is "-SOX17+0.5*0.5^3/(0.5^3+ZIC3^3)+0.5*0.5^3/(0.5^3+OCT4^3)";  // modifiers: ZIC3, OCT4
  OCT4FOXD3_synthesis: -> OCT4FOXD3; -OCT4FOXD3 + 0.37*OCT4^3/(0.5^3 + OCT4^3) + 0.37*FOXD3^3/(0.5^3 + FOXD3^3); OCT4FOXD3_synthesis is "-OCT4FOXD3+0.37*OCT4^3/(0.5^3+OCT4^3)+0.37*FOXD3^3/(0.5^3+FOXD3^3)";  // modifiers: OCT4, FOXD3
  FOXA1_synthesis: -> FOXA1; -FOXA1 + 0.37*FOXA1^3/(0.5^3 + FOXA1^3) + 0.37*FOXD3^3/(0.5^3 + FOXD3^3) + 0.5*0.5^3/(0.5^3 + OCT4FOXD3^3); FOXA1_synthesis is "-FOXA1+0.37*FOXA1^3/(0.5^3+FOXA1^3)+0.37*FOXD3^3/(0.5^3+FOXD3^3)+0.5*0.5^3/(0.5^3+OCT4FOXD3^3)";  // modifiers: FOXD3, OCT4FOXD3
  AFP_synthesis: -> AFP; -AFP + 0.37*FOXA1^3/(0.5^3 + FOXA1^3) + 0.37*FOXA2^3/(0.5^3 + FOXA2^3); AFP_synthesis is "-AFP+0.37*FOXA1^3/(0.5^3+FOXA1^3)+0.37*FOXA2^3/(0.5^3+FOXA2^3)";  // modifiers: FOXA1, FOXA2
  SUMO1_synthesis: -> SUMO1; -SUMO1 + 0.37*NANOG^3/(0.5^3 + NANOG^3) + 0.37*E2F4^3/(0.5^3 + E2F4^3); SUMO1_synthesis is "-SUMO1+0.37*NANOG^3/(0.5^3+NANOG^3)+0.37*E2F4^3/(0.5^3+E2F4^3)";  // modifiers: NANOG, E2F4
  GATA4_synthesis: -> GATA4; -GATA4 + 0.37*SUMO1^3/(0.5^3 + SUMO1^3) + 0.37*PIAS1^3/(0.5^3 + PIAS1^3) + 0.5*0.5^3/(0.5^3 + NANOG^3) + 0.5*0.5^3/(0.5^3 + OCT4^3); GATA4_synthesis is "-GATA4+0.37*SUMO1^3/(0.5^3+SUMO1^3)+0.37*PIAS1^3/(0.5^3+PIAS1^3)+0.5*0.5^3/(0.5^3+NANOG^3)+0.5*0.5^3/(0.5^3+OCT4^3)";  // modifiers: SUMO1, PIAS1, NANOG, OCT4
  PIAS1_synthesis: -> PIAS1; -PIAS1 + 0.37*PIAS1^3/(0.5^3 + PIAS1^3) + 0.37*E2F4^3/(0.5^3 + E2F4^3); PIAS1_synthesis is "-PIAS1+0.37*PIAS1^3/(0.5^3+PIAS1^3)+0.37*E2F4^3/(0.5^3+E2F4^3)";  // modifiers: E2F4
  PRDM14_synthesis: -> PRDM14; -PRDM14 + 0.37*NANOG^3/(0.5^3 + NANOG^3) + 0.37*OCT4^3/(0.5^3 + OCT4^3) + 0.37*SOX2^3/(0.5^3 + SOX2^3); PRDM14_synthesis is "-PRDM14+0.37*NANOG^3/(0.5^3+NANOG^3)+0.37*OCT4^3/(0.5^3+OCT4^3)+0.37*SOX2^3/(0.5^3+SOX2^3)";  // modifiers: NANOG, OCT4, SOX2
  LMCD1_synthesis: -> LMCD1; -LMCD1 + 0.37*NANOG^3/(0.5^3 + NANOG^3) + 0.5*0.5^3/(0.5^3 + cAMP^3); LMCD1_synthesis is "-LMCD1+0.37*NANOG^3/(0.5^3+NANOG^3)+0.5*0.5^3/(0.5^3+cAMP^3)";  // modifiers: NANOG, cAMP
  T_synthesis: -> T; -T + 0.5*0.5^3/(0.5^3 + OCT4^3) + 0.5*0.5^3/(0.5^3 + NANOG^3) + 0.5*0.5^3/(0.5^3 + PRDM14^3) + 0.5*0.5^3/(0.5^3 + E2F4^3); T_synthesis is "-T+0.5*0.5^3/(0.5^3+OCT4^3)+0.5*0.5^3/(0.5^3+NANOG^3)+0.5*0.5^3/(0.5^3+PRDM14^3)+0.5*0.5^3/(0.5^3+E2F4^3)";  // modifiers: OCT4, NANOG, PRDM14, E2F4
  CSH1_synthesis: -> CSH1; -CSH1 + 0.5*0.5^3/(0.5^3 + PRDM14^3); CSH1_synthesis is "-CSH1+0.5*0.5^3/(0.5^3+PRDM14^3)";  // modifiers: PRDM14
  GATA2_synthesis: -> GATA2; -GATA2 + 0.5*0.5^3/(0.5^3 + SOX2^3) + 0.5*0.5^3/(0.5^3 + NANOG^3) + 0.5*0.5^3/(0.5^3 + PIASy^3) + 0.5*0.5^3/(0.5^3 + SUMO1^3); GATA2_synthesis is "-GATA2+0.5*0.5^3/(0.5^3+SOX2^3)+0.5*0.5^3/(0.5^3+NANOG^3)+0.5*0.5^3/(0.5^3+PIASy^3)+0.5*0.5^3/(0.5^3+SUMO1^3)";  // modifiers: SOX2, NANOG, PIASy, SUMO1
  PIASy_synthesis: -> PIASy; -PIASy + 0.37*PIAS1^3/(0.5^3 + PIAS1^3); PIASy_synthesis is "-PIASy+0.37*PIAS1^3/(0.5^3+PIAS1^3)";  // modifiers: PIAS1
  GATA3_synthesis: -> GATA3; -GATA3 + 0.5*0.5^3/(0.5^3 + NANOG^3); GATA3_synthesis is "-GATA3+0.5*0.5^3/(0.5^3+NANOG^3)";  // modifiers: NANOG
  hCGa_synthesis: -> hCGa; -hCGa + 0.37*GATA2^3/(0.5^3 + GATA2^3) + 0.37*GATA3^3/(0.5^3 + GATA3^3) + 0.37*cAMP^3/(0.5^3 + cAMP^3) + 0.5*0.5^3/(0.5^3 + OCT4^3); hCGa_synthesis is "-hCGa+0.37*GATA2^3/(0.5^3+GATA2^3)+0.37*GATA3^3/(0.5^3+GATA3^3)+0.37*cAMP^3/(0.5^3+cAMP^3)+0.5*0.5^3/(0.5^3+OCT4^3)";  // modifiers: GATA2, GATA3, cAMP, OCT4
  cAMP_synthesis: -> cAMP; -cAMP; cAMP_synthesis is "-cAMP";
  SP1_synthesis: -> SP1; -SP1 + 0.37*E2F4^3/(0.5^3 + E2F4^3) + 0.37*SP1^3/(0.5^3 + SP1^3) + 0.37*NFYA^3/(0.5^3 + NFYA^3) + 0.37*CEBP^3/(0.5^3 + CEBP^3) + 0.5*0.5^3/(0.5^3 + MYCSP1^3) + 0.5*0.5^3/(0.5^3 + SP3^3); SP1_synthesis is "-SP1+0.37*E2F4^3/(0.5^3+E2F4^3)+0.37*SP1^3/(0.5^3+SP1^3)+0.37*NFYA^3/(0.5^3+NFYA^3)+0.37*CEBP^3/(0.5^3+CEBP^3)+0.5*0.5^3/(0.5^3+MYCSP1^3)+0.5*0.5^3/(0.5^3+SP3^3)";  // modifiers: E2F4, NFYA, CEBP, MYCSP1, SP3
  hCGb_synthesis: -> hCGb; -hCGb + 0.37*SP1^3/(0.5^3 + SP1^3) + 0.37*SP3^3/(0.5^3 + SP3^3) + 0.37*cAMP^3/(0.5^3 + cAMP^3) + 0.5*0.5^3/(0.5^3 + OCT4^3); hCGb_synthesis is "-hCGb+0.37*SP1^3/(0.5^3+SP1^3)+0.37*SP3^3/(0.5^3+SP3^3)+0.37*cAMP^3/(0.5^3+cAMP^3)+0.5*0.5^3/(0.5^3+OCT4^3)";  // modifiers: SP1, SP3, cAMP, OCT4
  SP3_synthesis: -> SP3; -SP3 + 0.5*0.5^3/(0.5^3 + PIAS1^3) + 0.5*0.5^3/(0.5^3 + SUMO1^3); SP3_synthesis is "-SP3+0.5*0.5^3/(0.5^3+PIAS1^3)+0.5*0.5^3/(0.5^3+SUMO1^3)";  // modifiers: PIAS1, SUMO1
  BMP2K_synthesis: -> BMP2K; -BMP2K + 0.37*HNF4A^3/(0.5^3 + HNF4A^3); BMP2K_synthesis is "-BMP2K+0.37*HNF4A^3/(0.5^3+HNF4A^3)";  // modifiers: HNF4A
  BMP2_synthesis: -> BMP2; -1*BMP2 + 0.37*BMP2K^3/(0.5^3 + BMP2K^3) + 0.5*0.5^3/(0.5^3 + SOX2^3) + 0.5*0.5^3/(0.5^3 + NANOG^3); BMP2_synthesis is "-BMP2+0.37*BMP2K^3/(0.5^3+BMP2K^3)+0.5*0.5^3/(0.5^3+SOX2^3)+0.5*0.5^3/(0.5^3+NANOG^3)";  // modifiers: BMP2K, SOX2, NANOG
  HNF4A_synthesis: -> HNF4A; -HNF4A + 0.37*GATA6^3/(0.5^3 + GATA6^3) + 0.37*bCAT^3/(0.5^3 + bCAT^3); HNF4A_synthesis is "-HNF4A+0.37*GATA6^3/(0.5^3+GATA6^3)+0.37*bCAT^3/(0.5^3+bCAT^3)";  // modifiers: GATA6, bCAT
  bCAT_synthesis: -> bCAT; -bCAT; bCAT_synthesis is "-bCAT";
  CEBP_synthesis: -> CEBP; -CEBP + 0.5*0.5^3/(0.5^3 + E2F4^3) + 0.5*0.5^3/(0.5^3 + SP1^3); CEBP_synthesis is "-CEBP+0.5*0.5^3/(0.5^3+E2F4^3)+0.5*0.5^3/(0.5^3+SP1^3)";  // modifiers: E2F4, SP1
  FOXO1A_synthesis: -> FOXO1A; -FOXO1A + 0.37*NANOG^3/(0.5^3 + NANOG^3) + 0.37*OCT4^3/(0.5^3 + OCT4^3) + 0.37*SOX2^3/(0.5^3 + SOX2^3); FOXO1A_synthesis is "-FOXO1A+0.37*NANOG^3/(0.5^3+NANOG^3)+0.37*OCT4^3/(0.5^3+OCT4^3)+0.37*SOX2^3/(0.5^3+SOX2^3)";  // modifiers: NANOG, OCT4, SOX2
  LEF1_synthesis: -> LEF1; -LEF1 + 0.5*0.5^3/(0.5^3 + OCT4^3) + 0.5*0.5^3/(0.5^3 + NANOG^3); LEF1_synthesis is "-LEF1+0.5*0.5^3/(0.5^3+OCT4^3)+0.5*0.5^3/(0.5^3+NANOG^3)";  // modifiers: OCT4, NANOG
  LEF1bCat_synthesis: -> LEF1bCat; -1*LEF1bCat + 0.37*LEF1^3/(0.5^3 + LEF1^3) + 0.37*bCAT^3/(0.5^3 + bCAT^3); LEF1bCat_synthesis is "-LEF1bCat+0.37*LEF1^3/(0.5^3+LEF1^3)+0.37*bCAT^3/(0.5^3+bCAT^3)";  // modifiers: LEF1, bCAT
  Mad_synthesis: -> Mad; -Mad; Mad_synthesis is "-Mad";
  MadMax_synthesis: -> MadMax; -MadMax + 0.37*Mad^3/(0.5^3 + Mad^3) + 0.37*MAX^3/(0.5^3 + MAX^3); MadMax_synthesis is "-MadMax+0.37*Mad^3/(0.5^3+Mad^3)+0.37*MAX^3/(0.5^3+MAX^3)";  // modifiers: Mad, MAX
  MAX_synthesis: -> MAX; -MAX; MAX_synthesis is "-MAX";
  MYC_synthesis: -> MYC; -MYC + 0.37*LEF1bCat^3/(0.5^3 + LEF1bCat^3) + 0.37*PRDM14^3/(0.5^3 + PRDM14^3) + 0.37*E2F4^3/(0.5^3 + E2F4^3) + 0.5*0.5^3/(0.5^3 + TCF3^3); MYC_synthesis is "-MYC+0.37*LEF1bCat^3/(0.5^3+LEF1bCat^3)+0.37*PRDM14^3/(0.5^3+PRDM14^3)+0.37*E2F4^3/(0.5^3+E2F4^3)+0.5*0.5^3/(0.5^3+TCF3^3)";  // modifiers: LEF1bCat, PRDM14, E2F4, TCF3
  TCF3_synthesis: -> TCF3; -1*TCF3 + 0.37*E2F4^3/(0.5^3 + E2F4^3); TCF3_synthesis is "-TCF3+0.37*E2F4^3/(0.5^3+E2F4^3)";  // modifiers: E2F4
  MycMax_synthesis: -> MycMax; -1*MycMax + 0.37*MAX^3/(0.5^3 + MAX^3) + 0.37*MYC^3/(0.5^3 + MYC^3); MycMax_synthesis is "-MycMax+0.37*MAX^3/(0.5^3+MAX^3)+0.37*MYC^3/(0.5^3+MYC^3)";  // modifiers: MAX, MYC
  MYCSP1_synthesis: -> MYCSP1; -1*MYCSP1 + 0.37*SP1^3/(0.5^3 + SP1^3) + 0.37*MYC^3/(0.5^3 + MYC^3); MYCSP1_synthesis is "-MYCSP1+0.37*SP1^3/(0.5^3+SP1^3)+0.37*MYC^3/(0.5^3+MYC^3)";  // modifiers: SP1, MYC
  NFYA_synthesis: -> NFYA; -NFYA + 0.37*E2F4^3/(0.5^3 + E2F4^3) + 0.37*SOX2^3/(0.5^3 + SOX2^3); NFYA_synthesis is "-NFYA+0.37*E2F4^3/(0.5^3+E2F4^3)+0.37*SOX2^3/(0.5^3+SOX2^3)";  // modifiers: E2F4, SOX2
  SALL4_synthesis: -> SALL4; -SALL4 + 0.37*LEF1^3/(0.5^3 + LEF1^3) + 0.37*NANOG^3/(0.5^3 + NANOG^3) + 0.37*SOX2^3/(0.5^3 + SOX2^3); SALL4_synthesis is "-SALL4+0.37*LEF1^3/(0.5^3+LEF1^3)+0.37*NANOG^3/(0.5^3+NANOG^3)+0.37*SOX2^3/(0.5^3+SOX2^3)";  // modifiers: LEF1, NANOG, SOX2
  ZNF206_synthesis: -> ZNF206; -ZNF206 + 0.37*NANOG^3/(0.5^3 + NANOG^3); ZNF206_synthesis is "-ZNF206+0.37*NANOG^3/(0.5^3+NANOG^3)";  // modifiers: NANOG
  NANOG_synthesis: -> NANOG; -NANOG + 0.37*NANOG^3/(0.5^3 + NANOG^3) + 0.37*OCT4Sox2^3/(0.5^3 + OCT4Sox2^3) + 0.37*PBX1^3/(0.5^3 + PBX1^3) + 0.37*ZIC3^3/(0.5^3 + ZIC3^3) + 0.37*KLF4^3/(0.5^3 + KLF4^3) + 0.5*0.5^3/(0.5^3 + GATA6^3); NANOG_synthesis is "-NANOG+0.37*NANOG^3/(0.5^3+NANOG^3)+0.37*OCT4Sox2^3/(0.5^3+OCT4Sox2^3)+0.37*PBX1^3/(0.5^3+PBX1^3)+0.37*ZIC3^3/(0.5^3+ZIC3^3)+0.37*KLF4^3/(0.5^3+KLF4^3)+0.5*0.5^3/(0.5^3+GATA6^3)";  // modifiers: OCT4Sox2, PBX1, ZIC3, KLF4, GATA6
  OCT4_synthesis: -> OCT4; -OCT4 + 0.37*NANOG^3/(0.5^3 + NANOG^3) + 0.37*OCT4Sox2^3/(0.5^3 + OCT4Sox2^3) + 0.5*0.5^3/(0.5^3 + CDX2^3); OCT4_synthesis is "-OCT4+0.37*NANOG^3/(0.5^3+NANOG^3)+0.37*OCT4Sox2^3/(0.5^3+OCT4Sox2^3)+0.5*0.5^3/(0.5^3+CDX2^3)";  // modifiers: NANOG, OCT4Sox2, CDX2
  OCT4Sox2_synthesis: -> OCT4Sox2; -OCT4Sox2 + 0.37*OCT4^3/(0.5^3 + OCT4^3) + 0.37*SOX2^3/(0.5^3 + SOX2^3); OCT4Sox2_synthesis is "-OCT4Sox2+0.37*OCT4^3/(0.5^3+OCT4^3)+0.37*SOX2^3/(0.5^3+SOX2^3)";  // modifiers: OCT4, SOX2
  SOX2_synthesis: -> SOX2; -SOX2 + 0.37*NANOG^3/(0.5^3 + NANOG^3) + 0.37*OCT4Sox2^3/(0.5^3 + OCT4Sox2^3); SOX2_synthesis is "-SOX2+0.37*NANOG^3/(0.5^3+NANOG^3)+0.37*OCT4Sox2^3/(0.5^3+OCT4Sox2^3)";  // modifiers: NANOG, OCT4Sox2
  ZIC3_synthesis: -> ZIC3; -ZIC3 + 0.37*NANOG^3/(0.5^3 + NANOG^3) + 0.37*SOX2^3/(0.5^3 + SOX2^3); ZIC3_synthesis is "-ZIC3+0.37*NANOG^3/(0.5^3+NANOG^3)+0.37*SOX2^3/(0.5^3+SOX2^3)";  // modifiers: NANOG, SOX2
  KLF4_synthesis: -> KLF4; -KLF4 + 0.37*NANOG^3/(0.5^3 + NANOG^3) + 0.37*OCT4^3/(0.5^3 + OCT4^3) + 0.37*SOX2^3/(0.5^3 + SOX2^3); KLF4_synthesis is "-KLF4+0.37*NANOG^3/(0.5^3+NANOG^3)+0.37*OCT4^3/(0.5^3+OCT4^3)+0.37*SOX2^3/(0.5^3+SOX2^3)";  // modifiers: NANOG, OCT4, SOX2
  FOXD3_synthesis: -> FOXD3; -FOXD3 + 0.37*NANOG^3/(0.5^3 + NANOG^3) + 0.37*OCT4^3/(0.5^3 + OCT4^3) + 0.37*SOX2^3/(0.5^3 + SOX2^3) + 0.37*E2F4^3/(0.5^3 + E2F4^3); FOXD3_synthesis is "-FOXD3+0.37*NANOG^3/(0.5^3+NANOG^3)+0.37*OCT4^3/(0.5^3+OCT4^3)+0.37*SOX2^3/(0.5^3+SOX2^3)+0.37*E2F4^3/(0.5^3+E2F4^3)";  // modifiers: NANOG, OCT4, SOX2, E2F4
  ZFP42_synthesis: -> ZFP42; -ZFP42 + 0.37*NANOG^3/(0.5^3 + NANOG^3) + 0.37*OCT4^3/(0.5^3 + OCT4^3); ZFP42_synthesis is "-ZFP42+0.37*NANOG^3/(0.5^3+NANOG^3)+0.37*OCT4^3/(0.5^3+OCT4^3)";  // modifiers: NANOG, OCT4
  GDF3_synthesis: -> GDF3; -GDF3 + 0.37*SOX2^3/(0.5^3 + SOX2^3); GDF3_synthesis is "-GDF3+0.37*SOX2^3/(0.5^3+SOX2^3)";  // modifiers: SOX2
end
